<neuroml xmlns="http://www.neuroml.org/schema/neuroml2"  xmlns:xs="http://www.w3.org/2001/XMLSchema" xmlns:xsi="http://www.w3.org/2001/XMLSchema-instance" xsi:schemaLocation="http://www.neuroml.org/schema/neuroml2 https://raw.github.com/NeuroML/NeuroML2/development/Schemas/NeuroML2/NeuroML_v2beta5.xsd" id="network">
    <network id="network">
        <population id="GrCPop" component="IaF_GrC" size="487"/>
        <population id="mossySpikerONPop" component="mossySpikerON" size="180"/>
        <population id="mossySpikerOFFPop" component="mossySpikerOFF" size="7"/>
        <synapticConnection from="mossySpikerONPop[0]" to="GrCPop[10]" synapse="RothmanMFToGrCAMPA"/>
        <synapticConnection from="mossySpikerONPop[0]" to="GrCPop[10]" synapse="RothmanMFToGrCNMDA"/>
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    </network>
</neuroml>
